*Heading
** Job name: MPK-Linear Model name: MPK
** Generated by: Abaqus/CAE Student Edition 2018
*Preprint, echo=NO, model=NO, history=NO, contact=NO
**
** PARTS
**
*Part, name=MPK
*Node
      1,   30.1499996,          50.,        3200.
      2,   30.1499996,          50.,           0.
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*Element, type=S4R
  1,   1,  13, 215,  68
  2,  13,  14, 216, 215
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*Nset, nset=_PickedSet2, internal
   5,   6,   7,   8,   9,  10
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*Elset, elset=_PickedSet2, internal, generate
 433,  816,    1
*Nset, nset=_PickedSet3, internal
   1,   2,   3,   4,   5,   6
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*Elset, elset=_PickedSet3, internal
 337, 338, 339, 340, 341, 342
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*Nset, nset=_PickedSet4, internal
   1,   2,   3,   4,  13,  14
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*Elset, elset=_PickedSet4, internal, generate
   1,  336,    1
** Section: tube
*Shell Section, elset=_PickedSet4, material=steel
2.3, 5
** Section: shortplate
*Shell Section, elset=_PickedSet3, material=steel
6., 5
** Section: longplate
*Shell Section, elset=_PickedSet2, material=steel
6., 5
*End Part
**
**
** ASSEMBLY
**
*Assembly, name=Assembly
**
*Instance, name=MPK, part=MPK
*End Instance
**
*Nset, nset=_G3, internal, instance=MPK
   5,   6,   7,   8,   9,  10
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*Elset, elset=_G3, internal, instance=MPK
 433, 434, 435, 436, 437, 438
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*Nset, nset=_G4, internal, instance=MPK
  6, 11
*Elset, elset=__PickedSurf5_SNEG, internal, instance=MPK, generate
 433,  816,    1
*Surface, type=ELEMENT, name=_PickedSurf5, internal
__PickedSurf5_SNEG, SNEG
*End Assembly
**
** MATERIALS
**
*Material, name=steel
*Density
 7.84e-06,
*Elastic
210000., 0.3
** ----------------------------------------------------------------
**
** STEP: Linear
**
*Step, name=Linear, nlgeom=NO
*Static
1., 1., 1e-05, 1.
**
** BOUNDARY CONDITIONS
**
** Name: rigid body modes Type: Displacement/Rotation
*Boundary
_G4, 1, 1
_G4, 3, 3
_G4, 5, 5
** Name: vertical support Type: Displacement/Rotation
*Boundary
_G3, 2, 2
**
** LOADS
**
** Name: Pressure   Type: Pressure
*Dsload
_PickedSurf5, P, 0.0421875
**
** OUTPUT REQUESTS
**
*Restart, write, frequency=0
**
** FIELD OUTPUT: F-Output-1
**
*Output, field, variable=PRESELECT
**
** HISTORY OUTPUT: H-Output-1
**
*Output, history, variable=PRESELECT
*End Step
